# 1
x := 2
n := 15
y := (sqrt(x^3 + n) + cos(|n*x - 1|)^2)/(nthroot(x^5 + sin(x) + n, 4)*cos(π/4*(x + n)))
y = 2.87875
# 2
x := 7
y := 10
z := -3
p := if(x > y, sin(x) + 3*|y| - z^2, (y + 3)*ln(|x + 1|)/sqrt(z^2 + 1))
p = 8.5485
q := if((x ≤ y) and x < 1, cos(x) + 2*|y + 1|, (x*y + 3)/sqrt(y^2 + 5))
q = 7.12407
w := if((x < y) or (y ≥ 10), x^2 + 2*(y*x + 1) - z, (x^-3*y^2 + 3)*sqrt(z^2 + 7))
w = 194
# 3
Δx := 0.4
n := 2
x := -2, -2 + Δx .. 2
f(x) := (x^2 - (n*x) + sin(x))*sqrt(|x - cos(n*x)|)
x = [-2; -1.6; -1.2; -0.8; -0.4; 0; 0.4; 0.8; 1.2; 1.6; 2]
f(x) = [8.22753; 3.69265; 1.97785; 1.33681; 0.597535; 0; -0.136494; -0.220952; -0.0389189; 0.579605; 1.48125]
# 4
# С шаблонами
n := 7
a := -3*n
b := 3*n
a = -21
b = 21
A := runif(3, a, b)
B := runif(3, a, b)
C := runif(3, a, b)
A = [-14.6233; -20.6112; 6.04255]
B = [-3.58833; -17.1913; 8.3689]
C = [6.61617; 1.49011; -18.732]
s := A*B
s = 457.375
V := B×C
V = [309.556; -11.8466; 108.393]
w := (A×B)*C
w = -3627.59
# Без шаблонов
skalar := (A[0]*B[0] + A[1]*B[1] + A[2]*B[2])
skalar = 457.375
vector := [B[1]*C[2] - B[2]*C[1]; B[2]*C[0] - B[0]*C[2]; B[0]*C[1] - B[1]*C[0]]
vector = [309.556; -11.8466; 108.393]
mixed := A[0]*vector[0] + A[1]*vector[1] + A[2]*vector[2]
mixed = -3627.59
lenA := sqrt(A[0]^2 + A[1]^2 + A[2]^2)
lenA = 25.9841
# Вектор с наибольшей длинной
lenB := sqrt(B[0]^2 + B[1]^2 + B[2]^2)
lenB = 19.4539
lenC := sqrt(C[0]^2 + C[1]^2 + C[2]^2)
lenC = 19.9219
Lengths := [lenA; lenB; lenC]
MaxLength := max(Lengths)
Result := if(MaxLength == lenA, "Это А", if(MaxLength == lenB, "Это Б", "Это С"))
Result = "Это А"
N := 11
M[N, N] := N
M = [
    0, 0, 0, 0, 0, 0, 0, 0, 0, 0, 0, 0;
    0, 0, 0, 0, 0, 0, 0, 0, 0, 0, 0, 0;
    0, 0, 0, 0, 0, 0, 0, 0, 0, 0, 0, 0;
    0, 0, 0, 0, 0, 0, 0, 0, 0, 0, 0, 0;
    0, 0, 0, 0, 0, 0, 0, 0, 0, 0, 0, 0;
    0, 0, 0, 0, 0, 0, 0, 0, 0, 0, 0, 0;
    0, 0, 0, 0, 0, 0, 0, 0, 0, 0, 0, 0;
    0, 0, 0, 0, 0, 0, 0, 0, 0, 0, 0, 0;
    0, 0, 0, 0, 0, 0, 0, 0, 0, 0, 0, 0;
    0, 0, 0, 0, 0, 0, 0, 0, 0, 0, 0, 0;
    0, 0, 0, 0, 0, 0, 0, 0, 0, 0, 0, 0;
    0, 0, 0, 0, 0, 0, 0, 0, 0, 0, 0, 11
]
n := 0 .. N
m := 0 .. N
M[n, m] := round(-10 + 20*rnd(1))
M = [
    9, -5, -6, 7, -1, -2, 10, -9, 9, -5, 2, -6;
    -6, 5, 7, -5, 4, -5, -10, 6, -3, -7, 10, -7;
    5, 3, -3, -6, 8, 3, -7, 5, 7, 7, -8, 5;
    3, 2, -2, 6, -9, 1, 0, 6, -10, 2, -9, -4;
    2, 5, 6, 6, 1, 1, 8, -5, -1, 8, -7, 0;
    5, 8, -2, -9, -10, 9, 9, 7, -5, 4, 1, -2;
    0, 2, 7, -1, -7, 8, -2, 3, 10, -1, 6, -2;
    6, -7, 6, 5, 2, 8, -1, 1, -5, -5, 5, 0;
    -1, 1, 9, 2, -6, -9, -1, 1, 10, -8, -3, -5;
    -10, 3, 0, 2, -9, 3, -1, -4, -6, 2, 6, 2;
    9, 3, -5, 4, -6, 9, -9, 3, 2, -6, 5, 8;
    3, -3, 1, -1, 2, -7, -4, 4, 1, -5, -2, -9
]
Sum := sum(sum(M[n, m], m), n) = 49
SumPol := sum(sum(M[n, m]*(M[n, m] > 0), m), n)
SumPol = 376
SumOtr := sum(sum(M[n, m]*(M[n, m] < 0), m), n)
SumOtr = -327
X := M[:, 0]
Y := transpose(M)[:, cols(M) - 1]
X = [9; -6; 5; 3; 2; 5; 0; 6; -1; -10; 9; 3]
Y = [3; -3; 1; -1; 2; -7; -4; 4; 1; -5; -2; -9]
Skalar := X*Y = 44
# 5
y(x1) := e^(-(|x1|/3))*cos(x1)
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# 6
Δx := 0.25
x := -9, -9 + Δx .. 9
f(x) := if(x < 0, exp(x)*x^3, exp(-x)*x^3)
x = [
    -9; -8.75; -8.5; -8.25; -8; -7.75; -7.5; -7.25; -7; -6.75
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]
f(x) = [
    -0.0899657; -0.106157; -0.124955; -0.146701; -0.171757; -0.200504; -0.233332; -0.270632; -0.312776; -0.3601
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]
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# 7
Δx := π/4
x1 := -2*π
x2 := 2*π
Nx := (x2 - x1)/Δx
Nx = 16
i := 0 .. Nx
g(x) := sqrt(|x|)*sin(x)
x[i] := x1 + i*Δx
Y[i] := g(x[i])
X[i] := x[i]
X = [-6.28319; -5.49779; -4.71239; -3.92699; -3.14159; -2.35619; -1.5708; -0.785398; 0; 0.785398; 1.5708; 2.35619; 3.14159; 3.92699; 4.71239; 5.49779; 6.28319]
Y = [0; 1.65798; 2.1708; 1.40125; 0; -1.0854; -1.25331; -0.626657; 0; 0.626657; 1.25331; 1.0854; 0; -1.40125; -2.1708; -1.65798; 0]
WRITEPRN("X.txt") := X
WRITEPRN("Y.txt") := Y
XX := READPRN("X.txt")
YY := READPRN("Y.txt")
XX = [-6.283; -5.498; -4.712; -3.927; -3.142; -2.356; -1.571; -0.7854; 0; 0.7854; 1.571; 2.356; 3.142; 3.927; 4.712; 5.498; 6.283]
YY = [0; 1.658; 2.171; 1.401; 0; -1.085; -1.253; -0.6267; 0; 0.6267; 1.253; 1.085; 0; -1.401; -2.171; -1.658; 0]
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# 8
q(x) := e^(-x^2)
x := -3, -2.9 .. 3
p(x) := d/dx(q(x))
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# 9
f(x, y) := sin(sqrt(x^2 + y^2))/sqrt(x^2 + y^2)
# [component: inputs f]
# 10
x1 := -5
x2 := 5
Δx := 0.1
x^2 + (x - 2)*sin(x) == 5
f(x) := x^2 + (x - 2)*sin(x) - 5
x := x1, x1 + Δx .. x2
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# Исходя из графика берем наиболее явыне точки -4 и 2
x := -4
x1 := root(f(x), x)
x := 2
x2 := root(f(x), x)
x1 = -1.32936
x2 = 2.19967
f(x1) = 0
f(x2) = 3.52607e-13
# 11
x^2 + x*sin(2*x) - (x - 5)*cos(x) == 0
x1 := -4
x2 := 4
Δx := 0.1
f(x) := x^2 + x*sin(2*x) - (x - 5)*cos(x)
x := x1, x1 + Δx .. x2
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x1 := root(f(x), x, -4, -2)
x1 = -2.97354
f(x1) = -1.77636e-15
x2 := root(f(x), x, -2, 0)
x2 = -1.93283
f(x2) = 0
# 12
x^3 + (4 - n)*x^2 + (3 - 4*n)*x - 3*n == 0
n := 3
f(x) := x^3 + (4 - n)*x^2 + (3 - 4*n)*x - 3*n
V := [-3*n; 3 - 4*n; 4 - n; 1]
V = [-9; -9; 1; 1]
R := polyroots(V)
R = [-3; -1; 3]
# 13
1.*Матричный*способ
n := 6
A := [n, n + 1, n + 2; n - 3, n - 2, n; n - 1, n, n + 1]
A = [6, 7, 8; 3, 4, 6; 5, 6, 7]
|A| = -1
# Свободные члены
B = [-3.58833; -17.1913; 8.3689]
B := [6*n + 8; 6*n - 7; 6*n + 2]
Проверка
X := A^-1*B
X = [1; 2; 3]
x := X[0] = 1
A*X = [44; 29; 38]
y := X[1] = 2
z := X[2] = 3
2.*Гивен*иф*айнд*□
x := 0
y := 0
z := 0
Given
n*x + (n + 1)*y + (n + 2)*z == 6*n + 8
(n - 3)*x + (n - 2)*y + n*z == 6*n - 7
(n - 1)*x + n*y + (n + 1)*z == 6*n + 2
V := Find(x, y, z)
V = [1; 2; 3]
# 14
x^2/81 + y^2/16 == 1
t := 0, 0.01 .. 2*π
(x - 9)^2 + (y - 2)^2 == 25
xOkr(t) := 9 + 5*cos(t)
xEl(t) := 9*cos(t)
yOkr(t) := 2 + 5*sin(t)
yEl(t) := 4*sin(t)
# Ищем точки пересечения
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x := 5
y := 0
Given
x^2/81 + y^2/16 == 1
(x - 9)^2 + (y - 2)^2 == 25
V := Find(x, y)
V = [6.9308; -2.55175]
x := 8
y := 0
Given
x^2/81 + y^2/16 == 1
(x - 9)^2 + (y - 2)^2 == 25
V := Find(x, y)
V = [6.9308; -2.55175]
# 15
x := 0, 0.1 .. 10
f(x) := x*sin(x)
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x := 2
x1_max := Maximize(f, x)
x1_max = 2.02876
y1_max := f(x1_max)
x := 5
y1_max = 1.81971
x1_min := Minimize(f, x)
x1_min = 4.91318
y1_min := f(x1_min)
y1_min = -4.81447
x := 8
x2_max := Maximize(f, x)
x2_max = 7.97867
y2_max := f(x2_max)
y2_max = 7.91673
